OpenVSP model (file version 5), 16 components.
Geometry view with OpenVSP parameter names; values to 6 digits, angles in degrees, lengths in the model's unit.
Overall bounding box: X_Min=0 X_Len=10.94 Y_Min=-8.19796 Y_Len=16.3959 Z_Min=-1.33 Z_Len=4.88

Fuselage "Fuselage"
  location (X Y Z) 0 0 0, rotation 0 0 0
  bounding box size 10.75 1.55 1.95208
  Design: Length=10.75
  cross sections:
    n  XLocPercent  YLocPercent  ZLocPercent  shape
    0  0            0            -0.027907    point
    1  0.05         0            -0.0186047   rounded rectangle RoundRectXSec_Radius=0.2 RoundedRect_Height=0.9 RoundedRect_Width=0.8
    2  0.25         0            0            rounded rectangle RoundRectXSec_Radius=0.2 RoundedRect_Height=1.7 RoundedRect_Width=1.55
    3  0.5          0            0            as above
    4  0.66         0            0.015814     rounded rectangle RoundRectXSec_Radius=0.2 RoundedRect_Height=1.34 RoundedRect_Width=1.25
    5  0.85         0            0.0372093    rounded rectangle RoundRectXSec_Radius=0.2 RoundedRect_Height=0.8 RoundedRect_Width=0.78
    6  1            0            0.0744186    point

Wing "MainWing"
  location (X Y Z) 2.93008 0 0.88, rotation 0 0 0
  symmetric about XZ
  bounding box size 2.35892 16.3959 0.588745
  totals: TotalSpan=16.4 TotalProjectedSpan=16.39 TotalChord=1.81793 TotalArea=30 TotalAR=8.95441 MAC=1.88063
  root: chord 2.36035, twist 2, airfoil file ""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 BaseThickChord=0.16998 ThickChord=0.16998
  sections:
    n  Span  Root_Chord  Tip_Chord  Area      Sweep  Sweep_Location  Dihedral  Twist     Twist_Location  tip airfoil
    1  0.85  2.36035     2.25024    1.9595    0      0.25            2         1.79268   0.25            as above
    2  5     2.25024     1.60259    9.63209   0      0.25            2         0.573171  0.25            as above
    3  0.1   1.60259     1.58964    0.159611  0      0.25            2         0.54878   0.25            as above
    4  2.25  1.58964     1.29819    3.2488    0      0.25            2         0         0.25            as above
  SS_Control "SS_CONT_0": UStart=0.75 UEnd=0.978 Length_C_Start=0.25 Length_C_End=0.25 Length_Start=0.360977 Length_End=0.32455 LE_Flag=0 Surf_Type=2
  SS_Control "SS_CONT_1": UStart=0.25 UEnd=0.5 Length_C_Start=0.3 Length_C_End=0.3 Length_Start=0.691594 Length_End=0.480781 LE_Flag=0 Surf_Type=2

Fuselage "WingRootFairing"
  location (X Y Z) 2.7 0 0, rotation 0 0 0
  bounding box size 3.0096 1.3 1.43784
  Design: Length=2.82
  cross sections:
    n  XLocPercent  YLocPercent  ZLocPercent  shape
    0  0            0            0.166283     point
    1  0.0531915    0            0.166283     rounded rectangle RoundRectXSec_Radius=0.08 RoundedRect_Height=1.43784 RoundedRect_Width=1.3
    2  0.946809     0            0.166283     as above
    3  1            0            0.166283     point

Wing "HTail"
  location (X Y Z) 8.99068 0 0.8, rotation 0 0 0
  symmetric about XZ
  bounding box size 1.71796 6.18466 0.206249
  totals: TotalSpan=6.18466 TotalProjectedSpan=6.18466 TotalChord=1.37437 TotalArea=8.5 TotalAR=4.5 MAC=1.403
  root: chord 1.71796, twist 0, NACA 4-series Camber=0 CamberLoc=0.3 ThickChord=0.12
  sections:
    n  Span     Root_Chord  Tip_Chord  Area  Sweep  Sweep_Location  Dihedral  Twist  Twist_Location  tip airfoil
    1  3.09233  1.71796     1.03078    4.25  0      0.25            0         0      0.25            as above
  SS_Control "SS_CONT_0": UStart=0.12 UEnd=0.98 Length_C_Start=0.35 Length_C_End=0.35 Length_Start=0.601286 Length_End=0.360772 LE_Flag=0 Surf_Type=2

Fuselage "TailRootFairing"
  location (X Y Z) 8.4 0 0, rotation 0 0 0
  bounding box size 2.54 0.68 0.36
  Design: Length=2.54
  cross sections:
    n  XLocPercent  YLocPercent  ZLocPercent  shape
    0  0            0            0.295276     point
    1  0.0787402    0            0.322835     rounded rectangle RoundRectXSec_Radius=0.03 RoundedRect_Height=0.36 RoundedRect_Width=0.68
    2  0.940945     0            0.322835     as above
    3  1            0            0.299213     point

Wing "VTail"
  location (X Y Z) 8.77157 0 0.8, rotation 90 0 0
  bounding box size 1.94898 0.232833 2.75
  totals: TotalSpan=2.75 TotalProjectedSpan=2.75 TotalChord=1.45455 TotalArea=4 TotalAR=1.89062 MAC=1.50842
  root: chord 1.93939, twist 0, NACA 4-series Camber=0 CamberLoc=0.3 ThickChord=0.12
  sections:
    n  Span  Root_Chord  Tip_Chord  Area  Sweep  Sweep_Location  Dihedral  Twist  Twist_Location  tip airfoil
    1  2.75  1.93939     0.969697   4     15     0.25            0         0      0.25            as above
  SS_Control "SS_CONT_0": UStart=0.03 UEnd=0.97 Length_C_Start=0.4 Length_C_End=0.4 Length_Start=0.775758 Length_End=0.387879 LE_Flag=0 Surf_Type=2

Fuselage "Nacelle_R"
  location (X Y Z) 1.66 1.6 0.75, rotation 0 0 0
  bounding box size 2.2 0.68 0.74
  Design: Length=2.2
  cross sections:
    n  XLocPercent  YLocPercent  ZLocPercent  shape
    0  0            0            0            point
    1  0.08         0            0            ellipse Ellipse_Height=0.54 Ellipse_Width=0.5
    2  0.25         0            0            ellipse Ellipse_Height=0.74 Ellipse_Width=0.68
    3  0.65         0            0            as above
    4  0.86         0            0            ellipse Ellipse_Height=0.52 Ellipse_Width=0.48
    5  1            0            0            point

Fuselage "Nacelle_L"
  location (X Y Z) 1.66 -1.6 0.75, rotation 0 0 0
  bounding box size 2.2 0.68 0.74
  Design: Length=2.2
  cross sections:
    n  XLocPercent  YLocPercent  ZLocPercent  shape
    0  0            0            0            point
    1  0.08         0            0            ellipse Ellipse_Height=0.54 Ellipse_Width=0.5
    2  0.25         0            0            ellipse Ellipse_Height=0.74 Ellipse_Width=0.68
    3  0.65         0            0            as above
    4  0.86         0            0            ellipse Ellipse_Height=0.52 Ellipse_Width=0.48
    5  1            0            0            point

Propeller "Prop_R"
  location (X Y Z) 1.6 1.6 0.75, rotation 0 0 0
  bounding box size 0.0993939 2.0036 2.0036
  Design: Diameter=2 NumBlade=4 Beta34=20 UseBeta34Flag=1 Feather=0 Rotate=0 Precone=0 ReverseFlag=0 FoldAngle=0 PropMode=1 AF=151.538 CLi=0.538798 Chord=0.177656 Solidity=0.226199 ConstructXoC=0.5 FeatherAxisXoC=0.5 FeatherOffsetXoC=0
  cross sections:
    n  RadiusFrac  shape
    0  0.2         ellipse Ellipse_Height=0.04 Ellipse_Width=0.08
    1  0.4         NACA 16-series Chord=0.16625 IdealCl=0.7 ThickChord=0.144074
    2  1           NACA 16-series Chord=0.13 IdealCl=0.2 ThickChord=0.03
  Chord along r/R (cubic Bezier): 0.2: 0.08, 0.333333: 0.15, 0.466667: 0.2, 0.6: 0.2, 0.716667: 0.2, 0.833333: 0.2, 0.95: 0.2, 0.966667: 0.2, 0.983333: 0.2, 1: 0.13
  Twist along r/R (PCHIP): 0.2: 46.75, 0.75: 20, 1: 13
  Thick along r/R (cubic Bezier): 0.2: 0.5, 0.233333: 0.3, 0.266667: 0.225, 0.3: 0.2, 0.4: 0.125, 0.5: 0.115, 0.6: 0.1, 0.733333: 0.075, 0.866667: 0.055, 1: 0.03
  CLI along r/R (cubic Bezier): 0.2: 0, 0.266667: 0.7, 0.333333: 0.7, 0.4: 0.7, 0.466667: 0.7, 0.533333: 0.7, 0.6: 0.7, 0.733333: 0.7, 0.866667: 0.7, 1: 0.2

Propeller "Prop_L"
  location (X Y Z) 1.6 -1.6 0.75, rotation 0 0 0
  bounding box size 0.0993939 2.0036 2.0036
  Design: Diameter=2 NumBlade=4 Beta34=20 UseBeta34Flag=1 Feather=0 Rotate=0 Precone=0 ReverseFlag=0 FoldAngle=0 PropMode=1 AF=151.538 CLi=0.538798 Chord=0.177656 Solidity=0.226199 ConstructXoC=0.5 FeatherAxisXoC=0.5 FeatherOffsetXoC=0
  cross sections:
    n  RadiusFrac  shape
    0  0.2         ellipse Ellipse_Height=0.04 Ellipse_Width=0.08
    1  0.4         NACA 16-series Chord=0.16625 IdealCl=0.7 ThickChord=0.144074
    2  1           NACA 16-series Chord=0.13 IdealCl=0.2 ThickChord=0.03
  blade curves as in "Prop_R"

Wing "LiftStrut_Pair"
  location (X Y Z) 3.37 0.728975 -0.525374, rotation 0 0 0
  symmetric about XZ
  bounding box size 0.3 8.42085 1.51753
  totals: TotalSpan=7.54702 TotalProjectedSpan=6.94707 TotalChord=0.285 TotalArea=2.1458 TotalAR=22.4913 MAC=0.284624
  root: chord 0.3, twist 0, NACA 4-series Camber=0 CamberLoc=0.3 ThickChord=0.15
  sections:
    n  Span     Root_Chord  Tip_Chord  Area      Sweep  Sweep_Location  Dihedral  Twist  Twist_Location  tip airfoil
    1  0.05     0.3         0.3        0.015     0      0.25            23        0      0.25            as above
    2  3.50351  0.3         0.27       0.998501  0      0.25            23        0      0.25            as above
    3  0.22     0.27        0.27       0.0594    0      0.25            23        0      0.25            as above

Wing "MainGearLeg_Pair"
  location (X Y Z) 4.17 0.7 -0.72, rotation 0 0 0
  symmetric about XZ
  bounding box size 0.24 3.91152 0.426555
  totals: TotalSpan=2.61297 TotalProjectedSpan=2.5 TotalChord=0.21 TotalArea=0.548723 TotalAR=11.3901 MAC=0.211429
  root: chord 0.24, twist 0, NACA 4-series Camber=0 CamberLoc=0.3 ThickChord=0.22
  sections:
    n  Span     Root_Chord  Tip_Chord  Area      Sweep  Sweep_Location  Dihedral  Twist  Twist_Location  tip airfoil
    1  1.30648  0.24        0.18       0.274362  0      0.25            -16.9093  0      0.25            as above

Pod "MainWheel_Pair"
  location (X Y Z) 3.99 1.95 -1.1, rotation 0 0 0
  symmetric about XZ
  bounding box size 0.6 4.34 0.44
  Design: FineRatio=2.72727 Length=0.6

Wing "NoseGearLeg"
  location (X Y Z) 0.65 0 -0.64, rotation -90 0 0
  bounding box size 0.22 0.0484184 0.51
  totals: TotalSpan=0.51 TotalProjectedSpan=0.51 TotalChord=0.2 TotalArea=0.102 TotalAR=2.55 MAC=0.200667
  root: chord 0.22, twist 0, NACA 4-series Camber=0 CamberLoc=0.3 ThickChord=0.22
  sections:
    n  Span  Root_Chord  Tip_Chord  Area   Sweep  Sweep_Location  Dihedral  Twist  Twist_Location  tip airfoil
    1  0.51  0.22        0.18       0.102  0      0.25            0         0      0.25            as above

Pod "NoseWheel"
  location (X Y Z) 0.5 0 -1.15, rotation 0 0 0
  bounding box size 0.5 0.36 0.36
  Design: FineRatio=2.77778 Length=0.5

NGonMesh "MeshGeom_NGon"
  location (X Y Z) 0 0 0, rotation 0 0 0

VSPAERO settings (reference component "MainWing"): Sref=30 bref=16.4 cref=1.881 Xcg=3.75 Ycg=0 Zcg=0 AlphaStart=4 AlphaEnd=4 AlphaNpts=1 BetaStart=0 BetaEnd=0 BetaNpts=1 MachStart=0.203 MachEnd=0.203 MachNpts=1 ReCref=6.98e+06 Vinf=100 Rho=0.002377
